# ====================================================================== #
# Equilibrate a system of polymers following a Gaussian angle potential and
# a harmonic dihedral potential in implicit solvent.
#
# Authors:
#     Kee-Myoung Nam
#
# Last updated:
#     5/21/2026
# ====================================================================== #
# INPUT VARIABLES
# ===============
variable f file ${VARS}
variable init_filename string $f
next f
variable lammpstrj_filename string $f
next f
variable outfilename string $f
next f
variable lj_coeffs_filename string $f
next f
variable dt equal $f
next f
variable damp equal $f
next f
variable nsteps1 equal $f
next f
variable nsteps2 equal $f
next f
variable nsteps_per_dump equal $f
next f
variable seed_velocity equal $f
next f
variable seed_langevin equal $f
print ${dt}
print ${damp}
print ${nsteps1}
print ${nsteps2}
print ${nsteps_per_dump}
print ${seed_velocity}
print ${seed_langevin}

# ====================================================================== #
# INITIALIZATION
# ==============
# Use nano units (nm, ag, ns, K; 1 kT = 4.141947 ag*nm^2/ns^2) in 3 dimensions
units nano
dimension 3

# Use FENE bonds for polymeric bonds
atom_style molecular
bond_style fene

# Subject polymeric bond angles to a multiple Gaussian angle potential
angle_style gaussian

# Subject polymeric dihedral angles to a harmonic potential
dihedral_style harmonic

# Use Lennard-Jones potentials between unbonded molecules
#
# Note that the 2.5 * \sigma cutoff ratio is re-written below when the initial
# configuration file is parsed
pair_style lj/cut 4.6632124352

# Use periodic boundary conditions in all 3 dimensions
boundary p p p

# Maintain neighbor lists with given additional "skin" distance
#
# Skin distance is set to 0.3 * \sigma
neighbor 0.5595854922 bin

# Build neighbor lists at every timestep
neigh_modify delay 0 every 1 check yes

# Accommodate larger communication cutoff (max FENE bond length = 2.8 nm,
# LAMMPS computes a larger cutoff of ~4.6 nm due to bond angles and dihedrals)
comm_modify cutoff 4.6

# ====================================================================== #
# PARSE INPUT MOLECULES
# =====================
read_data ${init_filename}
pair_modify shift yes

# - Exclude Lennard-Jones potential contributions between FENE-bonded atoms
# - Weight Lennard-Jones potential contributions between 1-3 atoms with angles
special_bonds fene angle no

# Write the Lennard-Jones potential parameters
write_coeff ${lj_coeffs_filename}

# Reset non-bonded interactions, with the cutoff set to 2^(1/6) * \sigma
pair_style soft 2.09371159271
pair_coeff * * 0.0

# ====================================================================== #
# DEFINE INITIAL VELOCITIES
# =========================
# Set initial velocities of all molecules from a Gaussian distribution with
# angular momenta set to zero
variable temp equal 300.0
velocity all create ${temp} ${seed_velocity} rot yes dist gaussian

# ====================================================================== #
# PRINT THERMODYNAMIC INFORMATION DURING SIMULATION
# =================================================
thermo ${nsteps_per_dump}
thermo_style custom step temp press vol pxx pyy pzz etotal ke pe epair ebond eangle edihed

# ====================================================================== #
# SET UP SIMULATION
# =================
timestep ${dt}
reset_timestep 0

# Write polymer and crosslinker coordinates from simulation to file:
# - Write atom ID, molecule ID, atom type, atom coordinates, and atom velocities
# - Sort lines by atom ID
dump sim1 all custom ${nsteps_per_dump} ${lammpstrj_filename} id mol type xu yu zu vx vy vz
dump_modify sim1 sort id

# ====================================================================== #
# SET UP ENSEMBLES
# ================
# Apply NVE ensemble plus Langevin thermostat
fix fx1 all nve
fix fx2 all langevin ${temp} ${temp} ${damp} ${seed_langevin}

# Introduce a ramp for the energy scale of the non-bonded interactions
variable soft_prefactor equal ramp(0,41.41947)
fix fx3 all adapt 1 pair soft a * * v_soft_prefactor

# ====================================================================== #
# RUN SIMULATION
# ==============
run ${nsteps1}

# ====================================================================== #
# RE-INTRODUCE LENNARD-JONES POTENTIAL
# ===================================
unfix fx3
pair_style lj/cut 4.6632124352
include ${lj_coeffs_filename}
pair_modify shift yes

# ====================================================================== #
# PRINT THERMODYNAMIC INFORMATION DURING MINIMIZATION
# ===================================================
thermo 10
thermo_style custom step temp etotal ke pe epair ebond eangle edihed press

# ====================================================================== #
# ENERGY MINIMIZATION
# ===================
minimize 1e-4 1e-6 5000 10000

# ====================================================================== #
# RUN SECOND SIMULATION
# =====================
thermo ${nsteps_per_dump}
thermo_style custom step temp press vol pxx pyy pzz etotal ke pe epair ebond eangle edihed
undump sim1
reset_timestep 0
dump sim1 all custom ${nsteps_per_dump} ${lammpstrj_filename} id mol type xu yu zu vx vy vz
dump_modify sim1 sort id append yes
run ${nsteps2}

# ====================================================================== #
# WRITE FINAL SYSTEM STATE TO FILE
# ================================
write_data ${outfilename}
