# ====================================================================== #
# Equilibrate a test system of 5 polymers of length 20 and 50 crosslinkers
# in implicit solvent.
#
# Authors:
#     Kee-Myoung Nam
#
# Last updated:
#     1/22/2024
# ====================================================================== #
# INITIALIZATION
# ==============
# Use Lennard-Jones units in 3 dimensions
units lj
dimension 3

# Use FENE bonds (without angular, dihedral, improper, etc. contributions)
# and use harmonic bonds for polymer/crosslinker bonds
atom_style bond
bond_style hybrid fene harmonic

# Use Lennard-Jones potentials between unbonded molecules (note that the
# 2.5 cutoff ratio is re-written below)
pair_style lj/cut 2.5

# Use periodic boundary conditions in all 3 dimensions
boundary p p p

# Maintain neighbor lists with given additional "skin" distance
neighbor 1.4 bin

# Build neighbor lists at every timestep
neigh_modify every 1 delay 1

# ====================================================================== #
# PARSE INPUT MOLECULES
# =====================
read_data test_init.data

# ====================================================================== #
# DEFINE BOND AND POTENTIAL PARAMETERS
# ====================================
# Define FENE bond parameters (K, R0, \epsilon, \sigma)
# - Set maximum length to slightly more than double the monomer radius
bond_coeff 1 fene 30.0 2.5 1.0 1.0

# Define harmonic bond parameters (K, R0)
# - Set equilibrium length to slightly more than combined monomer/crosslinker
#   radius
bond_coeff 2 harmonic 50 4.5

# Define Lennard-Jones potential parameters (\epsilon, \sigma, cutoff ratio)
# - Set cutoff distance for monomers to radius * 2^(1/6)
# - Set cutoff distance for crosslinkers to radius * 2.5
# - Set cutoff distance for monomer/crosslinker interactions to larger value
pair_coeff 1 1 1.0 1.0 1.1224620483    # Only repulsion for monomers
pair_coeff 2 2 1.0 3.0 7.5             # Attraction and repulsion for crosslinkers
pair_coeff 1 2 1.0 1.7320508076 7.5    # Use arithmetic/geometric mixing
pair_modify shift yes

# Exclude Lennard-Jones potential contributions between FENE-bonded atoms
special_bonds fene

# ====================================================================== #
# PRINT THERMODYNAMIC INFORMATION DURING MINIMIZATION
# ===================================================
thermo 10
thermo_style custom step temp pe ke etotal press

# ====================================================================== #
# ENERGY MINIMIZATION
# ===================
minimize 1.0e-4 1.0e-6 5000 10000

# ====================================================================== #
# DEFINE INITIAL VELOCITIES
# =========================
# Set initial velocities of all molecules from a Gaussian distribution with
# angular momenta set to zero
variable g equal 1.0
velocity all create $g 12345 rot yes dist gaussian

# ====================================================================== #
# PRINT THERMODYNAMIC INFORMATION DURING SIMULATION
# =================================================
thermo 1000
thermo_style custom step temp press vol pxx pyy pzz etotal epair ebond

# ====================================================================== #
# SET UP SIMULATION
# =================
timestep 0.001
reset_timestep 0

# Sample from NVE ensemble with Langevin thermostat
fix 1 all nve
fix 2 all langevin $g $g 2.0 12345

# Write polymer and crosslinker coordinates from simulation to file:
# - Write every 1000 timesteps
# - Write atom ID, molecule ID, atom type, and atom coordinates
# - Sort lines by atom ID
dump 1 all custom 1000 test.lammpstrj id mol type xu yu zu
dump_modify 1 sort id

# Write polymer bonds and polymer/crosslinker bonds to file:
compute 1 all property/local btype batom1 batom2
dump 2 all local 1000 test.bond index c_1[1] c_1[2] c_1[3]
dump_modify 2 sort 3

# ====================================================================== #
# RUN SIMULATION
# ==============
run 100000
