# ====================================================================== #
# Equilibrate a test system of 5 polymers of length 20 and 50 crosslinkers
# in implicit solvent.
#
# Authors:
#     Kee-Myoung Nam
#
# Last updated:
#     1/23/2024
# ====================================================================== #
# INITIALIZATION
# ==============
# Use Lennard-Jones units in 3 dimensions
units lj
dimension 3

# Use FENE bonds (without angular, dihedral, improper, etc. contributions)
# and use harmonic bonds for polymer/crosslinker bonds
atom_style bond
bond_style hybrid fene harmonic

# Use Lennard-Jones potentials between unbonded molecules (note that the
# 2.5 cutoff ratio is re-written below)
pair_style lj/cut 2.5

# Use periodic boundary conditions in all 3 dimensions
boundary p p p

# Maintain neighbor lists with given additional "skin" distance
neighbor 1.4 bin

# Build neighbor lists at every timestep
neigh_modify every 1 delay 1

# ====================================================================== #
# PARSE INPUT MOLECULES
# =====================
read_data test_init.data

# ====================================================================== #
# DEFINE BOND AND POTENTIAL PARAMETERS
# ====================================
# Define FENE bond parameters (K, R0, \epsilon, \sigma)
bond_coeff 1 fene 30.0 1.5 1.0 1.0

# Define harmonic bond parameters (K, R0)
bond_coeff 2 harmonic 50 1.0

# Define Lennard-Jones potential parameters (\epsilon, \sigma, cutoff ratio)
pair_coeff 1 1 1.0 1.0 1.1224620483
pair_coeff 2 2 1.0 3.0 2.5
pair_modify shift yes

# Exclude Lennard-Jones potential contributions between FENE-bonded atoms
special_bonds fene

# ====================================================================== #
# PRINT THERMODYNAMIC INFORMATION DURING MINIMIZATION
# ===================================================
thermo 10
thermo_style custom step temp pe ke etotal press

# ====================================================================== #
# ENERGY MINIMIZATION
# ===================
minimize 1.0e-4 1.0e-6 5000 10000

# ====================================================================== #
# DEFINE INITIAL VELOCITIES
# =========================
# Set initial velocities of all molecules from a Gaussian distribution with
# angular momenta set to zero
variable g equal 1.0
velocity all create $g 12345 rot yes dist gaussian

# ====================================================================== #
# PRINT THERMODYNAMIC INFORMATION DURING SIMULATION
# =================================================
thermo 1000
thermo_style custom step temp press vol lx ly lz pxx pyy pzz etotal epair ebond

# ====================================================================== #
# SET UP SIMULATION
# =================
timestep 0.01
reset_timestep 0

# Write polymer and crosslinker coordinates from simulation to file:
# - Write every 1000 timesteps
# - Write atom ID, molecule ID, atom type, and atom coordinates
# - Sort lines by atom ID
dump 1 all custom 1000 test_react.lammpstrj id mol type xu yu zu
dump_modify 1 sort id

# Write polymer bonds and polymer/crosslinker bonds to file:
compute 1 all property/local btype batom1 batom2
dump 2 all local 1000 test_react.bond index c_1[1] c_1[2] c_1[3]
dump_modify 2 sort 3

# ====================================================================== #
# DEFINE MOLECULE TEMPLATES
# =========================
molecule forward_unbonded unreacted.data_template
molecule forward_bonded reacted.data_template
molecule reverse_bonded reacted.data_template
molecule reverse_unbonded unreacted.data_template

# ====================================================================== #
# DEFINE POLYMER/CROSSLINKER BONDING REACTION
# ===========================================
# TODO What is statted_grp?
# - prob = 1.0 to ensure that the reaction proceeds if all constraints
#   (including the Arrhenius constraint) is satisfied
fix myrxns all bond/react stabilization yes statted_grp 0.5 &
    react rxn1 1 2 0.0 1.1 forward_unbonded forward_bonded forward_map prob 1.0 1234 &
    react rxn2 1 2 1.1001 2.45 reverse_bonded reverse_unbonded reverse_map prob 1.0 12345

# ====================================================================== #
# SET UP ENSEMBLES
# ================
# TODO What are the internally defined groups here?
fix 1 statted_group_REACT nvt temp $g $g 2.0
fix 2 bond_react_MASTER_group langevin $g $g 2.0 12345

# ====================================================================== #
# RUN SIMULATION
# ==============
run 100000
